# 2D dense sheared granular flow: measure mu, Theta, I, and per-contact
# orientation data, to test n = -d ln(mu)/d ln(Theta) at fixed I vs mu_g.
#
# Prereq: run gen_data.py first to produce the data file this reads.
#
# Usage:
#   lmp -in in.granular_2d -var datafile data.granular -var mu_g 0.3 \
#       -var gdot 1.0e-3 -var Tgran 0.02 -var seed 12345 -var label run001 \
#       -var nequil 40000 -var nmeas 80000

variable datafile index data.granular
variable mu_g     index 0.1
variable gdot     index 1.0e-3
variable Tgran    index 0.02
variable Pconf    index 0.05
variable seed     index 12345
variable label    index test
variable nequil   index 40000
variable nmeas    index 80000
variable e_rest   index 0.5     # restitution (production 0.5)
variable kt_spec  index NULL    # tangential stiffness; NULL = derive from kn

units           lj
dimension       2
atom_style      sphere
boundary        p p p
newton          off

read_data       ${datafile}

# pair style: Hertzian normal contact + Coulomb-limited (Mindlin)
# tangential history, friction coefficient mu_g. Coefficients:
#   normal:  Hertzian, effective modulus 1.0e5, Poisson 0.3, restitution 0.5
#   tangential: mindlin, tangential stiffness ratio auto (NULL), damping 1.0,
#               friction coefficient mu_g
pair_style      granular
pair_coeff      * * hertz/material 1.0e5 0.3 ${e_rest} tangential mindlin ${kt_spec} 1.0 ${mu_g} damping tsuji

neighbor        0.3 bin
neigh_modify    every 1 delay 0 check yes
comm_modify     vel yes

# initial relaxation: settle overlaps, no shear
fix             integrate all nve/sphere
fix             damp all viscous 1.0
timestep        0.001
thermo          500
thermo_style    custom step ke
run             3000
unfix           damp
unfix           integrate
velocity        all set 0.0 0.0 0.0
reset_timestep  0

# Lees-Edwards simple shear via triclinic box deformation
change_box      all triclinic
fix             shear all deform 1 xy erate ${gdot} remap v units box

# ---- bias-corrected granular temperature: removes the affine shear
# streaming velocity so thermostat + diagnostics see non-affine motion only
compute         tbias all temp/deform

# thermostat the fluctuation temperature only (independent of I)
fix             therm all langevin ${Tgran} ${Tgran} 0.5 ${seed} zero yes
fix_modify      therm temp tbias

# stress tensor / pressure (bias-corrected)
compute         press all pressure tbias

# ---- constant-pressure ensemble: barostat only the y box length to hold
# the confining pressure Pconf fixed, decoupled from the imposed xy shear
# (fix deform above only touches the xy tilt factor, not Ly, so the two
# do not fight over the same degree of freedom). This is what keeps the
# inertial number I fixed while Theta is scanned via Tgran -- without it,
# raising Tgran inflates the measured pressure at fixed box area and I
# drifts by up to 7x across a Theta sweep, confounding the n(mu_g) fit.
fix             baro all nph/sphere y ${Pconf} ${Pconf} 1.0 ptemp ${Tgran}
fix_modify      baro press press

variable        P      equal (c_press[1]+c_press[2])/2.0
variable        tau    equal c_press[4]
# fix deform's xy erate convention makes tau come out negative here; only
# the magnitude is physical, so mu is defined from |tau|
variable        muI    equal abs(v_tau)/v_P
variable        Theta  equal c_tbias
variable        rmean  equal 0.5   # nominal mean radius (matches gen_data.py default range)
variable        Iiner  equal ${gdot}*2.0*v_rmean/sqrt(v_P)

# per-contact geometry dump for the fabric tensor (post-processed)
compute         pl all pair/local dx dy dz fx fy
dump            contacts all local 5000 dump.contacts.${label} index c_pl[1] c_pl[2] c_pl[4] c_pl[5]
dump_modify     contacts first no

thermo_style    custom step v_P v_tau v_muI c_tbias v_Theta v_Iiner
thermo          1000

log             log.${label} append

run             ${nequil}

print           "=== BEGIN MEASUREMENT WINDOW ${label} ==="
run             ${nmeas}
print           "DONE label=${label} mu_g=${mu_g} gdot=${gdot} Tgran=${Tgran} seed=${seed}"
